###############################################
# LAMMPS script for nucleosomes and linkers
###############################################

#Paths
variable id index 1
variable out index "init_config_${id}"
variable dump_out index "dump_initial${id}"
### Set the main parameters
# Find out what the variabls actually represent
variable E equal 9.0 # these lines define variables used for the rest of the simulation.
variable I equal 0.3
variable wrapEuniform equal 10.0

# Seeds for the randomness engines
# variable seed equal 54654651     # a seed for the thermostat
# variable seed2 equal 84575451     # a seed for the other thermostat

include seeds/seed_${id}.lammps

###
# Box and units  (use LJ units and periodic boundaries)
###

units lj                 # use lennard-jones (i.e. dimensionless) units. these units are reduced from conventional units decsribed at https://docs.lammps.org/99/units.html.
atom_style hybrid angle ellipsoid   # atoms with bonds, angles and orientations. "angle" -> provides bonds and angle data, "ellipsoid" -> atomic data + rmass (per atom mass)

boundary p p p           # all boundaries are periodic


###
# Pair interactions require lists of neighbours to be calculated
###
neighbor 1.9 bin # 1.9 is the skin distance which basically defines what atoms are considered "neighbours", the "bin" mode creates the neighbour list using the binning operation which scales linearly with N/P (number of atoms per processor unit). Distance added onto the potential range
neigh_modify every 1 delay 1 check yes # affects the building of the pairwise lists. "every" -> attempt to build the list every 1 step, "delay" -> never build new lists until at least 1 step after previous build, "check yes" -> on each step where an attempt is allowed a list is only build if at least one atom moved more than half the skin distance since the last build.


###
# READ "start" data file
###
read_data initial_positions/data_${id}.lammps # this file defines the starting positions


###
# Define groups. The atom positions, bonds, angles, and types are initally defined in the "start" data file.
###
group all type 1 2 3 4 5 6 7 8 9 10 11 12 13 14 15 16 17 18 19 20 21 22 23 # technically this is predefined to just include all atoms
group dna type 1 2 # atom types 1 and 2 are part of the dna group
group smallcore type 3 # only atoms of type 3 make up the small core
group bigcore type 4 # only atoms of type 4 make up the big code
group patches type 5 6 7 8 9 10 11 12 13 14 15 16 17 18 19 20 21 22 # the patches are the "sticky bits" to which the DNA attracts
group nucCentre type 23  # new type for the central bead in each nucleosome core

group notnuc molecule 0        # a group for everything which is not in a rigid body. all atoms of molecule ID 0
group nuc molecule > 0  # a group for stuff in rigid bodies. all other atoms


## Set up the parameters for the inter-nucleosome attraction
## These parameters are realistic according to Moller et al.
## Except here we have turned off side-to-side attractions
## With this ratio of FS/FF, it will not form fibres, will form
## droplets -- would need to add 4th order correction to get fibres
## Later we might also want to switch of face-to-side attractions
## and we will need to revisit the other parameters.
variable nucE_FF equal ${E}  ## depth of face-to-face well
variable nucE_FS equal ${I}   ## depth of face-to-side well
variable nucE_SS equal 0.0      ## depth of side-to-side-A well
variable nucE_S0 equal 0.0      ## depth of side-to-side-B well
#
variable nucL_D0 equal 0.784
variable nucR_FF equal 2.752    ## range of face-to-face
variable nucR_FS equal 3.508    ## range of face-to-side
variable nucR_SS equal 4.988    ## range of side-to-side-A
variable nucR_S0 equal 4.944    ## range of side-to-side-B

# convert these to the actual parameters needed for the pair styles
variable nucE_a equal ${nucE_S0}
variable nucE_b equal ${nucE_SS}-${nucE_S0}
variable nucE_c equal 2.0*${nucE_FS}-2.0*${nucE_S0}
variable nucE_d equal ${nucE_FF}-2.0*${nucE_FS}-${nucE_SS}+2.0*${nucE_S0}
variable nucE_e equal 0.0 ## Will need to change later--add 4th order correction
variable nucA_a equal 0.64930686589/${nucL_D0}
variable nucR_a equal ${nucR_S0}
variable nucR_b equal ${nucR_SS}-${nucR_S0}
variable nucR_c equal 2.0*${nucR_FS}-2.0*${nucR_S0}
variable nucR_d equal ${nucR_FF}-2.0*${nucR_FS}-${nucR_SS}+2.0*${nucR_S0}


###
# Dump configurations
###
compute quat all property/atom quatw quati quatj quatk # compute a quantuty called quat on all atoms per atom. this quantity is a quaternion (rotation) for aspherical particles
# for the initial bit, dump quite often
dump dum1 all custom 5000 sim_outputs/initial/${dump_out}.nucleosomes id type x y z ix iy iz c_quat[1] c_quat[2] c_quat[3] c_quat[4] # dump every 5000 iterations the atom id, atom type, unscaled coordinates, box image of the atom, the quat vector computed above
# compute the quaternion which describes the orientation of each bead
# output along with coordinates


###
# Set up angle interactions
###

## angles
angle_style  hybrid cosine polytorsion polytorsionend # cosine uses potential E = K[1+cos(theta)], polytorsion is defined somewhere in this paper https://arxiv.org/abs/1404.1704
angle_coeff   1 cosine 29.41  # gives persistence length of 50nm for 5 bp beads
angle_coeff   2 polytorsion 70.0 44.12
angle_coeff   3 polytorsion 70.0 0.0  ### Fixed, not using polytorsionend


###
# pair and bond interactions - start with 'soft' potentials
###

## Between bonded atoms
bond_style   harmonic # harmonic uses potential E = K(r-r_0)^2
# For style harmonic, specify:
#   * bond type
#   * K (energy/distance^2)
#   * R0 (distance)
bond_coeff   1   1000.0   0.7

## Between non-bonded atoms
pair_style soft 1.12246152962189 # soft computes pairwise interactions with the formula E = A[1 + cos(pi*r/r_c)] for r < r_c
pair_coeff 1*3 1*3  100.0 1.12246152962189
pair_coeff 4 4  100.0 1.53242039900875 # these have diameter 1.365232
pair_coeff 1*3 4  100.0 1.32744096431532 # diameter 0.5*(1+1.365232)
pair_coeff 1*3 5*22 0.0 1.12246152962189
pair_coeff 4 5*22 100.0 1.32744096431532 # diameter 0.5*(1+1.365232)
pair_coeff 5*22 5*22 100.0 1.12246152962189

pair_coeff 1*23 23 100.0 1.12246152962189 # diameter 1

###
# Set up fixes. Things that happen at every timestep
###

fix 1 notnuc nve/asphere                            # NVE integrator
fix 2 notnuc langevin 1.0 1.0 0.5 ${seed} angmom 3.333  # langevin thermostat
#fix 3 nuc rigid/small molecule langevin 1.0 1.0 1.0 ${seed2}
fix 3 nuc rigid/small molecule langevin/rotation 1.0 1.0 9.28 2.78 ${seed2} ## version with correct translational and rotational drag


##### Output thermodynamic info  (temperature, energy, pressure, etc.) #####
#compute nucenergy all pair exnusome
thermo 50000
thermo_style   custom   step  temp  epair  #c_nucenergy
### Change the temperature comutation so it is aware of ellipsoids
compute t1 all temp/asphere dof all
thermo_modify temp t1
############################################################################
# If I understand correctly this is kinda the equillibriation time

# set timestep of integrator, interactions == soft potentials to remove overlaps
timestep 0.005
run 50000  # total so far 50000


###
# Now switch to LJ potential and FENE bonds


###########################################
# Pair interaction between bonded atoms
bond_style   fene
special_bonds fene #<=== I M P O R T A N T (new command)
bond_coeff   1   64.88   1.28   1.0   0.68


###########################################
# Pair interaction between non-bonded atoms
pair_style      hybrid lj/cut 1.12246152962189 morse 1.12246152962189 exnusome 6.0
pair_modify     shift yes
pair_coeff      1*3 1*3 lj/cut 1.0 1.0 1.12246152962189
pair_coeff      4 4 lj/cut 1.0 1.365232 1.53242039900875 # these have diameter 1.365232
pair_coeff      1*3 4 lj/cut 1.0 1.182616 1.32744096431532 # diameter 0.5*(1+1.365232)
pair_coeff      1*3 5*22 lj/cut 1.0 1.0 1.12246152962189
pair_coeff      1 5*22 morse 0.0 1.75 0.0 0.9 # Morse use for the sticky patches
# patches need to exclude each other, to stop one DNA bead from interacting with
# multiple patches
pair_coeff      5*22 5*22 lj/cut 1.0 1.0 1.12246152962189
# will be turning these off, but still need to specify
pair_coeff      4 5*22 lj/cut 0.0 1.0 1.12246152962189

pair_coeff 1*22 23 lj/cut 1.0 1.0 1.12246152962189 # type 23 looks like a size 1 to everything

# add internucleosome interaction -- but attractrion set to zero to start with
#pair_coeff 23 23 exnusome 0.0 0.0 0.0 0.0 0.0 0.0 0.0 0.0 0.0 0.0
pair_coeff 23 23 exnusome 0.0 0.0 0.0 0.0 0.0 ${nucA_a} ${nucR_a} ${nucR_b} ${nucR_c} ${nucR_d}

neigh_modify exclude none
# no interactions between atoms in same rigid body
neigh_modify exclude molecule/intra nuc
# no interactions between big core and patches
neigh_modify exclude group bigcore patches


##### Output thermodynamic info  (temperature, energy, pressure, etc.) #####
compute nucenergy all pair exnusome
compute wrapenergy all pair morse
thermo 50000
thermo_style   custom   step  temp  epair  c_nucenergy c_wrapenergy
### Change the temperature comutation so it is aware of ellipsoids
### and switch off normalisation so that energies are the totals, not energy per atom
thermo_modify temp t1 norm no
############################################################################

# run with correct repulsive interactions
run 250000  # total so far 350000


######
## Add attractions
######

# switch on attraction between proteins and DNA so they wrap up
pair_coeff      1 5*22 morse ${wrapEuniform} 10.0 0.0 0.7
run 500000  # total so far 850000

# and between nucleosomes so they stack
pair_coeff 23 23 exnusome ${nucE_a} ${nucE_b} ${nucE_c} ${nucE_d} ${nucE_e} ${nucA_a} ${nucR_a} ${nucR_b} ${nucR_c} ${nucR_d}
run 150000 # total so far 1000000


## Output final config
write_data init_configs/${out}.init nocoeff
